Samplef := 48000
Afstand0.3m_samples := 54
190 - 136 = 54
Afstand1.0m_samples := 174
136 - 310 = -174
Afstand2.0m_samples := 518
650 - 132 = 518
V_lyd := 343 m/s
1 s/Samplef = 20.8333 μs
# -----------------------------------------------------------------------------------------------------
delay0.3m := 20.833 μs*Afstand0.3m_samples = 0.00112498 s
delay1.0m := 20.833 μs*Afstand1.0m_samples = 0.00362494 s
delay2.0m := 20.833 μs*Afstand2.0m_samples = 0.0107915 s
Afstand1m := V_lyd*delay0.3m = 38.5869 cm
Afstand2m := V_lyd*delay1.0m = 1.24336 m
Afstand3m := V_lyd*delay2.0m = 3.70148 m
